# Загружаем спектры:
Cs := READPRN("cs137comp.txt")
Co := READPRN("co60comp.txt")
# Находим положение пиков:
# Цезий ищем окне от 140 до 300 каналов, кобальт от 300 до 500
i := 0 .. 1023
m_cs137 := match(max(submatrix(Cs, 640, 790, 0, 0)), submatrix(Cs, 640, 790, 0, 0))[0] + 640 = 659
m_co60 := match(max(submatrix(Co, 800, 1000, 0, 0)), submatrix(Co, 800, 1000, 0, 0))[0] + 800 = 808
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# Если не получилось автоматом, то вручную вводим каналы куда попадает кобальт и наш цезий. Только отнимаем первые 512 каналов
Rbntu := [147; 260; 296]
Era226 := [661.66; 1173; 1332]  # Энергии которые при этом должны быть
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# проверка линейности калибровки (если больше точек чем две)
f(t) := line(Rbntu, Era226)[0] + line(Rbntu, Era226)[1]*t
t := 0 .. 400
g(t) := medfit(Rbntu, Era226)[0] + medfit(Rbntu, Era226)[1]*t
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# Считаем разрешение по цезию
Pm := m_cs137
P := [
    trunc(Pm - 2*0.63*sqrt(Pm));
    trunc(Pm - 0.63*sqrt(Pm));
    trunc(Pm + 0.63*sqrt(Pm));
    trunc(Pm + 2*0.63*sqrt(Pm))
] = [626; 642; 675; 691]
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Sp[i] := Cs[i]/Cs[0]
kb := line(Rbntu, Era226)[0] = -0.16841  # коэфициенты калибровки компенсационного детектора
ka := line(Rbntu, Era226)[1] = 4.50521
S1 := sum(Sp[i], i = P[0] .. P[1])/(P[1] - P[0] + 1) = 0.0459458
S2 := sum(Sp[i], i = P[2] .. P[3])/(P[3] - P[2] + 1) = 0.0122953
# Энергии наших окон компенсационных:
a := (S1 - S2)/(P[1] + P[0] - P[2] - P[3])*2 = -0.000686743
b := S1 - a*(P[1] + P[0])/2 = 0.481341
Sp_bkg[i] := Sp[i] - (a*i + b)
Ep := [80; 146; 400; 850; 1500; 2515]
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Pn := round((Ep - kb)/ka) = [18; 32; 89; 189; 333; 558]
K := [0.004153; 0.313511; 1.2; 3.334215; 0.159251]  # от ВП 30.01.2023
s := 0 .. P[3] - P[0]
x[s] := s + P[0]
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y[s] := Sp_bkg[s + P[0]]
gauss(x, A, μ, σ) := A/(sqrt(2*π)*σ)*exp(-((x - μ)/(sqrt(2)*σ))^2)
guess := [Pm/300; Pm; sqrt(Pm)/10]
v(x, A, μ, σ) := [
    gauss(x, A, μ, σ);
    1/A*gauss(x, A, μ, σ);
    (x - μ)/σ^2*gauss(x, A, μ, σ);
    (x - μ)^2/σ^3*gauss(x, A, μ, σ)
]
# Компенсация на фоне:
Pn[5] := 512
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Sig := sum(fon[j]/fon[0], j = 10 .. 230)  # error: Эта переменная не определена.
Results := genfit(x, y, guess, v)
A := Results[0] = 6.60768
CsIg := sum(K[n]*sum(fon[j]/fon[0], j = Pn[n] + 512 .. Pn[n + 1] + 511), n = 0 .. 4)  # error: Эта переменная не определена.
μ := Results[1] = 659.89
K ≡ 1
σ := Results[2] = 4.30268
Sig - CsIg =  # error: Эта переменная не определена.
# ЗАПИСЫВАЕМ КАЛИБРОВКИ В ФАЙЛ
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stdev(gauss(x, A, μ, σ) - y) = 0.0145295
find_all(txt, phs) :=
    j ← 0
    k ← 0
    while search(txt, phs, k) > -1
        v[j] ← search(txt, phs, k)
        k ← v[j] + 1
        j ← j + 1
    v if k > 0
    -1 otherwise
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# annotation to a formula above: Manipulating strings with Mathcad's string functions.
integral(gauss(x, A, μ, σ), x = P[0] .. P[3]) = 6.60768
v := find_all(CWD, "\")
FWHM := 2*sqrt(2*ln(2))*σ = 10.132
res := FWHM/(μ - 512)*100 = 6.85105
u1 := 340
u2 := 482
d1 := substr(CWD, 0, v[rows(v) - 3] + 1) = "D:\Kiyko\WORK\БД-ДАИ-5\ДАИ-5\"
d2 := substr(CWD, 0, v[rows(v) - 2] + 1) = "D:\Kiyko\WORK\БД-ДАИ-5\ДАИ-5\064\"
concat(d2, "rn222_all.txt") = "D:\Kiyko\WORK\БД-ДАИ-5\ДАИ-5\064\rn222_all.txt"
sn := READPRN(concat(d2, "sn.txt"))
sn := sn[0] = 64
res = 6.85105
Pn := stack(Pn, res, m_cs137)
WRITEPRN(concat(d1, "calib_cs_", num2str(sn), ".txt"), Pn) = [18; 32; 89; 189; 333; 512; 6.85105; 659]
