# Читаем серийник
sn := READPRN("sn.txt")[0] = 64
# Читаем спектры
fon := READPRN("fon.txt")  # фон
i := 0 .. 1023  # начало отсчета - от нуля
M2 := READPRN("am241.txt")  # америций
I[i] := i
Rn := READPRN("rn222.txt")  # радон
SrY := READPRN("sry90.txt")  # стронций
cs137_nash := READPRN("cs137.txt")  # цезий
C14 := READPRN("c14.txt")  # углерод
# КАЛИБРОВКА АЛЬФА КАНАЛА
# Автоматический поиск пиков
M := 5*s = 50
n := 0 .. 2*M
w[n] :=
    0 if |n - M| > M
    1/s*(1 - (n - M)^2/s^2)*exp(-(n - M)^2/(2*s^2)) otherwise
Z[M - 1] := 0
RnSr := ksmooth(I, Rn, 2)/Rn[0]*11710
s ≡ 10
# здесь множитель приблизительно
# задает масштаб от уровня радона в помещении
# у нас в офисе
v_3 := stack(Z, RnSr, Z)
k2 := M .. 1023 + M
rv5[k2] := sum(v_3[k2 - j]*w[j + M], j = -M .. M)
v := submatrix(rv5, M, 1023 + M, 0, 0)
Rbntu :=
    z ← 0
    for i ∈ 300 .. 1023
        v1 ← i if v[i] > 1 and v[i - 1] < 1
        if v[i] > 1 and v[i + 1] < 1 and v1 ≠ 0
            v2 ← i
            U ← submatrix(RnSr, v1, v2, 0, 0)
            M[z, 0] ← v1 + match(max(U), U)[0]
            z ← z + 1
            v1 ← 0
    M
# Каналы куда попадает радон на фильтре
am := match(max(M2), M2)[0] = 529  # положение пика америция
Rbntu = [588; 767; 884]
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# Если пики автоматически не нашлись, задаем их ниже вручную:
Rbntu := [Rbntu[0]; Rbntu[1]; 884] = [588; 767; 884]
# Энергии которые при этом должны быть
Era226 := [6002.35; 7686.82; 8784.86]
bRa := line(Rbntu, Era226)[1] = 9.40121  # калибровочные коэффициенты в альфа-канале
aRa := line(Rbntu, Era226)[0] = 474.907
Enewa[i] := aRa + bRa*i
p(e) := (e - aRa)/bRa
Enewa[1023] = 10092.3  # верхний предел диаппазона альфа
# проверка того куда попал америций 241. нужно учитывать разницу - радоны с фильтра а америций металл: можно добавить 50 кэВ
# Am214 - 5485.56 кэВ
Enewa[am] + 50 = 5498.15
f(t) := line(Rbntu, Era226)[0] + line(Rbntu, Era226)[1]*t
g(t) := medfit(Rbntu, Era226)[0] + medfit(Rbntu, Era226)[1]*t
t := 400 .. 900
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# проверка того, насколько хорошо откалиброван
# прибор - все должно быть на одной линии
# Каналы в альфа
# это если ставить энергию 3000 - нижнюю энергию в альфа-канале
ch := round([p(3000); p(4385.6); p(5687.5); p(6257.6); p(6337.7); p(8044.6)]) = [269; 416; 554; 615; 624; 805]  # можно 6257.6 отнести левее
# визуальная калибровка на графике ниже
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# это для проверки как поделился пик 218 радона нашим окном. в диаппазоне 0.4-0.5
ra := sum(Rn[i]/Rn[0], i = ch[0] .. ch[2] - 1)/sum(Rn[i]/Rn[0], i = ch[2] .. ch[3] - 1) = 0.55814
# Определим чувствительность по америцию с учетом Таниной поправки в формуле:
am_rate := sum(M2[i]/M2[0], i = ch[0] .. ceil(ch[2]) - 1) = 265.629
k1p9 := (am_rate*0.342/265)^-1 = 2.91705  # значение проходное
# КАЛИБРОВКА БЕТА КАНАЛА
# Значения в спектре начинаются с 11 канала. Поэтому нижний уровень дискриминации пусть будет 10 канал
SrY =  # no stored result
NUD_b := 10
# верхний уровень дискриминации в этих приборах пусть будет 230 канал (ниже объяснение-проверка)
VUD_b := 230
# значения скорости счета на фоне:
fonnn := sum(fon[i]/fon[0], i = NUD_b .. VUD_b) = 0.235294  # это меньше чем 0.2 значит прибор проходной
# вот такое разделение между альфа и бета. если нет в выбросах родия-рутения то можно сдвигать влево, иначе так и оставляем. чувствительность к урану немного просаживается
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# Скорости счета в бета канале от различных изотопов:
A_sr := sum(SrY[i]/SrY[0] - fon[i]/fon[0], i = NUD_b .. VUD_b) = 96.4889
A_am := sum(M2[i]/M2[0] - fon[i]/fon[0], i = NUD_b .. VUD_b) = 1.20602
A_c := sum(C14[i]/C14[0] - fon[i]/fon[0], i = NUD_b .. VUD_b) = 31.4303
A_cs := sum(cs137_nash[i]/cs137_nash[0] - fon[i]/fon[0], i = NUD_b .. VUD_b) = 350.146
cs := match(max(submatrix(cs137_nash, 50, 100, 0, 0)), cs137_nash)[0] = 67  # положение пика цезия
c14s[i] := (C14[i]/C14[0] - fon[i]/fon[0])/A_c
ugler :=
    z ← match(max(C14), C14)[0]
    M ← 0
    for i ∈ z .. 100
        M ← i if c14s[i] < 0.01 and c14s[i - 1] > 0.01 and M == 0
    M
ugler = 20  # положение пика углерода
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# Ели не получилось автоматически, ниже вручную вводим каналы куда попадает наш цезий и граница углерода (лучше смотреть не в логарифмическом масштабе)
Bch := [ugler; cs]
# Энергии которые при этом должны быть
Ben := [156.475; 624.216]
# получаем калибровку
line(Bch, Ben) = [-42.5637; 9.95194]
bB := line(Bch, Ben)[1] = 9.95194
aB := line(Bch, Ben)[0] = -42.5637
# Проверки калибровки в бета канале
Enewb[i] := aB + bB*i
pb(e) := (e - aB)/bB
Enewb[12] = 76.8595  # это нижняя энергия реально детектируемая
pb(53.818) = 9.68472  # пик америция был бы в этом канале если бы он показывался. мы реально видим кусочек
pb(3000) = 305.726  # это энергия самая верхняя была бы (родии рутении)
k1c0 := (A_sr*0.288/95.6)^-1 = 3.44023  # это чувствительность в бета канале с учетом Таниных попроавок
# ФОРМИРУЕМ ФАЙЛ ДЛЯ ЗАПИСИ
calib := [sn; aRa; bRa; k1p9; k1c0; bB; aB] = [64; 474.907; 9.40121; 2.91705; 3.44023; 9.95194; -42.5637]
c2 := [NUD_b; VUD_b] = [10; 230]
calib := stack(calib, Rbntu, Bch, c2, ch, ra, am)
find_all(txt, phs) :=
    j ← 0
    k ← 0
    while search(txt, phs, k) > -1
        v[j] ← search(txt, phs, k)
        k ← v[j] + 1
        j ← j + 1
    v if k > 0
    -1 otherwise
# annotation to a formula above: Manipulating strings with Mathcad's string functions.
v := find_all(CWD, "\")
d2 := CWD = "C:\Users\misha\Desktop\Работа\kalibrovka\kalibrovka\bin\Debug\064\"
d2 := substr(CWD, 0, v[rows(v) - 2] + 1) = "C:\Users\misha\Desktop\Работа\kalibrovka\kalibrovka\bin\Debug\"
WRITEPRN(concat(d2, "calib_", num2str(sn), ".txt"), calib) = [64; 474.907; 9.40121; 2.91705; 3.44023; 9.95194; -42.5637; 588; 767; 884; 20; 67; 10; 230; 269; 416; 554; 615; 624; 805; 0.55814; 529]
