# Читаем серийник
sn := READPRN("sn.txt")[0] = 97
# Читаем спектры
fon := READEXCEL("Спектр фона 30 мин 00097 порог 22.xls", "B2:B1025")  # фон
M2 := READEXCEL("Спектр Ам241 00097 порог 22.xls", "B2:B1025")
# америций
i := 0 .. 1023
Rn := READEXCEL("97_rn.xls", "B2:B1025")
# радон
I[i] := i
SrY := READEXCEL("Спектр SrY90 00097 порог 22.xls", "B2:B1025")  # стронций
cs137_nash := READEXCEL("Спектр Cs137 00097 порог 22.xls", "B2:B1025")  # цезий
Rn2 := READEXCEL("97_rn2.xls", "B2:B1025")
C14 := READEXCEL("Спектр C14 00097 порог 22.xls", "B2:B1025")  # углерод
# КАЛИБРОВКА АЛЬФА КАНАЛА
Rn := Rn + Rn2
# Автоматический поиск пиков
Po_214 := match(max(submatrix(Rn, 200, 1023, 0, 0)), submatrix(Rn, 200, 1023, 0, 0))[0] + 200 = 731
Po_218 := match(max(submatrix(Rn, 200, Po_214 - 150, 0, 0)), submatrix(Rn, 200, Po_214 - 150, 0, 0))[0] + 200 = 560
Po_210 := match(max(submatrix(Rn, Po_214 + 40, 1023, 0, 0)), submatrix(Rn, Po_214 + 40, 1023, 0, 0))[0] + Po_214 + 40 = 847
Rbntu := [Po_218; Po_214; Po_210] = [560; 731; 847]  # Каналы куда попадает радон на фильтре
am := match(max(submatrix(M2, 1, 1023, 0, 0)), M2)[0] = 505  # положение пика америция
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# Если пики автоматически не нашлись, задаем их ниже вручную:
Rbntu := [Rbntu[0]; Rbntu[1]] = [560; 731]
# Энергии которые при этом должны быть
Era226 := [6002.35; 7686.82]
bRa := line(Rbntu, Era226)[1] = 9.8507  # калибровочные коэффициенты в альфа-канале
aRa := line(Rbntu, Era226)[0] = 485.957
Enewa[i] := aRa + bRa*i
p(e) := (e - aRa)/bRa
Enewa[1023] = 10563.2  # верхний предел диаппазона альфа
# проверка того куда попал америций 241. нужно учитывать разницу - радоны с фильтра а америций металл: можно добавить 50 кэВ
# Am214 - 5485.56 кэВ
Enewa[am] + 50 = 5510.56
f(t) := line(Rbntu, Era226)[0] + line(Rbntu, Era226)[1]*t
g(t) := medfit(Rbntu, Era226)[0] + medfit(Rbntu, Era226)[1]*t
t := 400 .. 900
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# проверка того, насколько хорошо откалиброван
# прибор - все должно быть на одной линии
# Каналы в альфа
# это если ставить энергию 3000 - нижнюю энергию в альфа-канале
ch := round([p(2700); p(4385.6); p(5687.5); p(6192.35); p(6337.7); p(8044.6)]) = [225; 396; 528; 579; 594; 767]  # можно 6257.6 отнести левее
# визуальная калибровка на графике ниже
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# это для проверки как поделился пик 218 радона нашим окном. в диаппазоне 0.4-0.5
ra := sum(Rn[i]/Rn[0], i = ch[0] .. ch[2] - 1)/sum(Rn[i]/Rn[0], i = ch[2] .. ch[3] - 1) = 0.566154
# Определим чувствительность по америцию с учетом Таниной поправки в формуле:
am_rate := sum(M2[i]/M2[0], i = ch[0] .. ceil(ch[2]) - 1) = 263.992
k1p9 := (am_rate/852)^-1 = 3.22737  # значение проходное  # 852 Бк
# КАЛИБРОВКА БЕТА КАНАЛА
# Значения в спектре начинаются с 11 канала. Поэтому нижний уровень дискриминации пусть будет 10 канал
SrY =  # no stored result
NUD_b := 10
# верхний уровень дискриминации в этих приборах пусть будет 230 канал (ниже объяснение-проверка)
VUD_b := 200
# значения скорости счета на фоне:
fonnn := sum(fon[i]/fon[0], i = NUD_b .. VUD_b) = 0.134317  # это меньше чем 0.2 значит прибор проходной
# вот такое разделение между альфа и бета. если нет в выбросах родия-рутения то можно сдвигать влево, иначе так и оставляем. чувствительность к урану немного просаживается
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# Скорости счета в бета канале от различных изотопов:
A_sr := sum(SrY[i]/SrY[0] - fon[i]/fon[0], i = NUD_b .. VUD_b) = 92.7772
A_am := sum(M2[i]/M2[0] - fon[i]/fon[0], i = NUD_b .. VUD_b) = 0.908301
A_c := sum(C14[i]/C14[0] - fon[i]/fon[0], i = NUD_b .. VUD_b) = 26.1631
A_cs := sum(cs137_nash[i]/cs137_nash[0] - fon[i]/fon[0], i = NUD_b .. VUD_b) = 373.528
cs := match(max(submatrix(cs137_nash, 50, 100, 0, 0)), cs137_nash)[0] = 65  # положение пика цезия
c14s[i] := (C14[i]/C14[0] - fon[i]/fon[0])/A_c
ugler :=
    z ← match(max(C14), C14)[0]
    M ← 0
    for i ∈ z .. 100
        M ← i if c14s[i] < 0.005 and c14s[i - 1] > 0.005 and M == 0
    M
ugler = 23  # положение пика углерода
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# Ели не получилось автоматически, ниже вручную вводим каналы куда попадает наш цезий и граница углерода (лучше смотреть не в логарифмическом масштабе)
Bch := [ugler; cs] = [23; 65]
# Энергии которые при этом должны быть
Ben := [156.475; 624.216]
# получаем калибровку
line(Bch, Ben) = [-99.6689; 11.1367]
bB := line(Bch, Ben)[1] = 11.1367
aB := line(Bch, Ben)[0] = -99.6689
# Проверки калибровки в бета канале
Enewb[i] := aB + bB*i
pb(e) := (e - aB)/bB
Enewb[12] = 33.9714  # это нижняя энергия реально детектируемая
pb(53.818) = 13.7821  # пик америция был бы в этом канале если бы он показывался. мы реально видим кусочек
pb(3000) = 278.329  # это энергия самая верхняя была бы (родии рутении)
k1c0 := (A_sr/365)^-1 = 3.93416  # это чувствительность в бета канале с учетом Таниных попроавок  # 365 Бк
# ФОРМИРУЕМ ФАЙЛ ДЛЯ ЗАПИСИ
calib := [sn; aRa; bRa; k1p9; k1c0; bB; aB] = [97; 485.957; 9.8507; 3.22737; 3.93416; 11.1367; -99.6689]
c2 := [NUD_b; VUD_b] = [10; 200]
calib := stack(calib, Rbntu, Bch, c2, ch, ra, am)
find_all(txt, phs) :=
    j ← 0
    k ← 0
    while search(txt, phs, k) > -1
        v[j] ← search(txt, phs, k)
        k ← v[j] + 1
        j ← j + 1
    v if k > 0
    -1 otherwise
# annotation to a formula above: Manipulating strings with Mathcad's string functions.
v := find_all(CWD, "\")
d2 := CWD = "C:\Users\shuu\Desktop\ДАИ 2025\097\"
d2 := substr(CWD, 0, v[rows(v) - 2] + 1) = "C:\Users\shuu\Desktop\ДАИ 2025\"
WRITEPRN(concat(d2, "calib_", num2str(sn), ".txt"), calib) = [97; 485.957; 9.8507; 3.22737; 3.93416; 11.1367; -99.6689; 560; 731; 23; 65; 10; 200; 225; 396; 528; 579; 594; 767; 0.566154; 505]
