# Загружаем спектры:
Cs := READEXCEL("cs_gamma.xls", "B2:B1025")
Th := READEXCEL("th232_gamma.xls", "B2:B1025")
min_co := 795
Am := READEXCEL("am_gamma.xls", "B2:B1025")
fon2 := READEXCEL("98_fon_2_gamma.xls", "B2:B1025")
fon := READEXCEL("98_fon_gamma.xls", "B2:B1025")
fon := fon + fon2
# Находим положение пиков:
# Цезий ищем окне от 140 до 300 каналов, кобальт от 300 до 500
i := 0 .. 1023
m_cs137 := match(max(submatrix(Cs, 580, 790, 0, 0)), submatrix(Cs, 580, 790, 0, 0))[0] + 580 = 649
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m_am241 := match(max(submatrix(Am, 1, 540, 0, 0)), submatrix(Am, 1, 540, 0, 0))[0] + 1 = 526
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# Если не получилось автоматом, то вручную вводим каналы куда попадает кобальт и наш цезий. Только отнимаем первые 512 каналов
Rbntu := [m_cs137 - 512; 552 - 512; m_am241 - 512; 530 - 512; 563 - 512] = [137; 40; 14; 18; 51]
m_cs137 := Rbntu[0] + 512 = 649
Era226 := [661.66; 184; 60; 77.11; 238.63]  # Энергии которые при этом должны быть
th := [28, 77.11; 96.3, 238.63; 137.2, 338.32; 229.9, 583.19; 353.2, 911.2; 374.6, 968.97; 917, 2614.53]
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# проверка линейности калибровки (если больше точек чем две)
line(Rbntu, Era226) = [-10.7272; 4.90398]
line(Rbntu, Era226) = [-10.7272; 4.90398]
t := 0 .. 400
f(t) := line(Rbntu, Era226)[0] + line(Rbntu, Era226)[1]*t
g(t) := medfit(Rbntu, Era226)[0] + medfit(Rbntu, Era226)[1]*t
f(828 - 512) = 1538.93
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# Считаем разрешение по цезию
Pm := m_cs137
P := [
    trunc(Pm - 1.5*0.63*sqrt(Pm));
    trunc(Pm - 0.63*sqrt(Pm));
    trunc(Pm + 0.63*sqrt(Pm));
    trunc(Pm + 1.5*0.63*sqrt(Pm))
] = [624; 632; 665; 673]
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Sp[i] := Cs[i]/Cs[0]
kb := line(Rbntu, Era226)[0] = -10.7272  # коэфициенты калибровки компенсационного детектора
ka := line(Rbntu, Era226)[1] = 4.90398
S1 := sum(Sp[i], i = P[0] .. P[1])/(P[1] - P[0] + 1) = 0.00204778
S2 := sum(Sp[i], i = P[2] .. P[3])/(P[3] - P[2] + 1) = 0.000353938
# Энергии наших окон компенсационных:
a := (S1 - S2)/(P[1] + P[0] - P[2] - P[3])*2 = -4.13133e-5
b := S1 - a*(P[1] + P[0])/2 = 0.0279925
Sp_bkg[i] := Sp[i] - (a*i + b)
Ep := [80; 146; 400; 850; 1500; 2515]
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Pn := round((Ep - kb)/ka) = [19; 32; 84; 176; 308; 515]
# от ВП 30.01.2023
# для китайского детектора
K := [0.004153; 0.313511; 1.2; 3.334215; 0.159251]
s := 0 .. P[3] - P[0]
Pn[5] := 511
x[s] := s + P[0]
Sig := sum(fon[j]/fon[0], j = 10 .. 230) = 0.446156
y[s] := Sp_bkg[s + P[0]]
gauss(x, A, μ, σ) := A/(sqrt(2*π)*σ)*exp(-((x - μ)/(sqrt(2)*σ))^2)
CsIg := sum(K[n]*sum(fon[j]/fon[0], j = Pn[n] + 512 .. Pn[n + 1] + 511), n = 0 .. 4) = 0.248306
Sig - CsIg = 0.19785
guess := [Pm/300; Pm; sqrt(Pm)/10]
v(x, A, μ, σ) := [
    gauss(x, A, μ, σ);
    1/A*gauss(x, A, μ, σ);
    (x - μ)/σ^2*gauss(x, A, μ, σ);
    (x - μ)^2/σ^3*gauss(x, A, μ, σ)
]
# ЗАПИСЫВАЕМ КАЛИБРОВКИ В ФАЙЛ
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find_all(txt, phs) :=
    j ← 0
    k ← 0
    while search(txt, phs, k) > -1
        v[j] ← search(txt, phs, k)
        k ← v[j] + 1
        j ← j + 1
    v if k > 0
    -1 otherwise
# annotation to a formula above: Manipulating strings with Mathcad's string functions.
Results := genfit(x, y, guess, v)
v := find_all(CWD, "\")
A := Results[0] = 0.324446
μ := Results[1] = 649.561
K ≡ 1
σ := Results[2] = 3.81786
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d1 := substr(CWD, 0, v[rows(v) - 3] + 1) = "C:\Users\Михаил\Desktop\"
d2 := substr(CWD, 0, v[rows(v) - 2] + 1) = "C:\Users\Михаил\Desktop\Diploma\"
stdev(gauss(x, A, μ, σ) - y) = 0.000768623
concat(d2, "rn222_all.txt") = "C:\Users\Михаил\Desktop\Diploma\rn222_all.txt"
sn := READPRN(concat(d2, "sn.txt"))  # error: Не удается открыть файл данных.
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integral(gauss(x, A, μ, σ), x = P[0] .. P[3]) = 0.324446
sn := sn[0]  # error: Эта переменная не определена.
FWHM := 2*sqrt(2*ln(2))*σ = 8.99038
res := FWHM/(μ - 512)*100 = 6.53558
u1 := 340
u2 := 482
res = 6.53558
Pn := stack(Pn, res, m_cs137)
WRITEPRN(concat(d1, "calib_cs_", num2str(sn), ".txt"), Pn) =  # error: Эта переменная не определена.
